*Heading
** Job name: Job-1 Model name: Model-1
** Generated by: Abaqus/CAE Learning Edition 2025
*Preprint, echo=NO, model=NO, history=NO, contact=NO
**
** PARTS
**
*Part, name=Part-1
*Node
      1,         -10.,          -5.,         200.
      2,         -10.,   1.66666663,         200.
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*Element, type=C3D8R
  1, 121, 122, 126, 125,   1,   2,   6,   5
  2, 122, 123, 127, 126,   2,   3,   7,   6
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*Nset, nset=a, generate
   1,  480,    1
*Elset, elset=a, generate
   1,  261,    1
** Section: Section-1
*Solid Section, elset=a, material=Material-1
,
*End Part
**
**
** ASSEMBLY
**
*Assembly, name=Assembly
**
*Instance, name=Part-1-1, part=Part-1
*End Instance
**
*Nset, nset=Set-1, instance=Part-1-1
   1,   2,   3,   4, 121, 122, 123, 124, 241, 242, 243, 244, 361, 362, 363, 364
*Elset, elset=Set-1, instance=Part-1-1
   1,   2,   3,  88,  89,  90, 175, 176, 177
*Elset, elset=_Surf-1_S5, internal, instance=Part-1-1
  85,  86,  87, 172, 173, 174, 259, 260, 261
*Surface, type=ELEMENT, name=Surf-1
_Surf-1_S5, S5
*End Assembly
**
** MATERIALS
**
*Material, name=Material-1
*Density
 7.8e-06,
*Elastic
210000., 0.3
** ----------------------------------------------------------------
**
** STEP: Step-1
**
*Step, name=Step-1, nlgeom=NO, perturbation
*Buckle
35, , 43, 30
**
** BOUNDARY CONDITIONS
**
** Name: BC-1 Type: Displacement/Rotation
*Boundary, op=NEW, load case=1
Set-1, 1, 1
Set-1, 2, 2
Set-1, 3, 3
Set-1, 4, 4
Set-1, 5, 5
Set-1, 6, 6
*Boundary, op=NEW, load case=2
Set-1, 1, 1
Set-1, 2, 2
Set-1, 3, 3
Set-1, 4, 4
Set-1, 5, 5
Set-1, 6, 6
**
** LOADS
**
** Name: Load-1   Type: Pressure
*Dsload
Surf-1, P, 400.
**
** OUTPUT REQUESTS
**
*Restart, write, frequency=0
**
** FIELD OUTPUT: F-Output-1
**
*Output, field, variable=PRESELECT
*End Step
